! Criação da seção de tensões de base
Set voltagebases=[0.220000000 0.380000000 0.440000000 23.100000000]
Calcvoltagebases
! Criação da seção de reset das tensões de base do BT
!Setkvbase Bus="BT108521" kvln=0.220000000
!Setkvbase Bus="BT108531" kvln=0.220000000
!Setkvbase Bus="BT108541" kvln=0.220000000
!Setkvbase Bus="BT109081" kvln=0.220000000
!Setkvbase Bus="BT109141" kvln=0.220000000
!Setkvbase Bus="BT109151" kvln=0.220000000
!Setkvbase Bus="BT109171" kvln=0.220000000
!Setkvbase Bus="BT109181" kvln=0.220000000
!Setkvbase Bus="BT109941" kvln=0.220000000
!Setkvbase Bus="BT11" kvln=0.220000000
!Setkvbase Bus="BT110001" kvln=0.220000000
!Setkvbase Bus="BT110011" kvln=0.220000000
!Setkvbase Bus="BT110021" kvln=0.220000000
!Setkvbase Bus="BT110051" kvln=0.220000000
!Setkvbase Bus="BT110061" kvln=0.220000000
!Setkvbase Bus="BT110081" kvln=0.220000000
!Setkvbase Bus="BT110091" kvln=0.220000000
!Setkvbase Bus="BT110101" kvln=0.220000000
!Setkvbase Bus="BT110151" kvln=0.220000000
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!Setkvbase Bus="BT881" kvln=0.220000000
!Setkvbase Bus="ET17_4963" kvln=0.220000000
!Setkvbase Bus="ET2_1955" kvln=0.220000000
!Setkvbase Bus="ET2_1992" kvln=0.220000000
!Setkvbase Bus="ET2_1997" kvln=0.220000000
!Setkvbase Bus="ET28_1044" kvln=0.220000000
!Setkvbase Bus="ET28_1120" kvln=0.220000000
!Setkvbase Bus="ET28_1173" kvln=0.220000000
!Setkvbase Bus="ET28_1474" kvln=0.220000000
!Setkvbase Bus="ET28_1751" kvln=0.220000000
!Setkvbase Bus="ET28_1767" kvln=0.220000000
!Setkvbase Bus="ET28_1829" kvln=0.220000000
!Setkvbase Bus="ET28_1932" kvln=0.220000000
!Setkvbase Bus="ET28_1935" kvln=0.220000000
!Setkvbase Bus="ET28_1945" kvln=0.220000000
!Setkvbase Bus="ET28_198" kvln=0.220000000
!Setkvbase Bus="ET28_1990" kvln=0.219393102
!Setkvbase Bus="ET28_1991" kvln=0.220000000
!Setkvbase Bus="ET28_1993" kvln=0.220000000
!Setkvbase Bus="ET28_1996" kvln=0.220000000
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!Setkvbase Bus="ET32_702" kvln=0.220000000
!Setkvbase Bus="UC2803522" kvln=0.220000000
!Setkvbase Bus="UC2805202" kvln=0.219393102
!Setkvbase Bus="UC2805203" kvln=0.219393102
!Setkvbase Bus="UC2805205" kvln=0.220000000
!Setkvbase Bus="UC2805207" kvln=0.220000000
!Setkvbase Bus="UC2805208" kvln=0.220000000
!Setkvbase Bus="UC2805210" kvln=0.220000000
!Setkvbase Bus="UC2805211" kvln=0.220000000
!Setkvbase Bus="UC2805212" kvln=0.220000000
!Setkvbase Bus="UC2805213" kvln=0.220000000
!Setkvbase Bus="UC2805215" kvln=0.220000000
!Setkvbase Bus="UC2805218" kvln=0.220000000
!Setkvbase Bus="UC2805220" kvln=0.220000000
!Setkvbase Bus="UC2805221" kvln=0.219393102
!Setkvbase Bus="UC2805222" kvln=0.220000000
!Setkvbase Bus="UC2805223" kvln=0.220000000
!Setkvbase Bus="UC2805224" kvln=0.220000000
!Setkvbase Bus="UC2805225" kvln=0.220000000
!Setkvbase Bus="UC2805226" kvln=0.220000000
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!Setkvbase Bus="UC3205286" kvln=0.220000000
