clear
Redirect "CircuitoMT_1_TAP2_1.dss"
Redirect "Arranjos_1_TAP2_1.dss"
Redirect "Trecho_MT_1_TAP2_1.dss"
Redirect "Trecho_BT_1_TAP2_1.dss"
Redirect "Ramais_BT_1_TAP2_1.dss"
Redirect "Regulador_Tensao_1_TAP2_1.dss"
Redirect "Transformador_MTBT_1_TAP2_1.dss"
Redirect "CurvaCarga_1_TAP2_1.dss"
Redirect "None"
Redirect "None"
